*Heading
** Job name: naca0012_TET4_350 Model name: Model-1
** Generated by: Abaqus/CAE 2021
*Preprint, echo=NO, model=NO, history=NO, contact=NO
**
** PARTS
**
*Part, name=naca0012_3D_tight
*End Part
**
**
** ASSEMBLY
**
*Assembly, name=Assembly
**
*Instance, name=naca0012_3D_tight-1, part=naca0012_3D_tight
*Node
      1,           0.,           0., 0.0199999996
      2,  0.150542721,           0., 0.0199999996
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*Element, type=C3D4
  1, 123,   7, 124,  73
  2, 125,  95,  94,  64
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*Nset, nset=Set-1, generate
   1,  138,    1
*Elset, elset=Set-1, generate
   1,  350,    1
** Section: Section-1
*Solid Section, elset=Set-1, material=Material-1
,
*End Instance
**
*End Assembly
**
** MATERIALS
**
*Material, name=Material-1
*Elastic
210000., 0.3
** ----------------------------------------------------------------
**
** STEP: Step-1
**
*Step, name=Step-1, nlgeom=NO
*Static
1., 1., 1e-05, 1.
**
** OUTPUT REQUESTS
**
*Restart, write, frequency=0
**
** FIELD OUTPUT: F-Output-1
**
*Output, field, variable=PRESELECT
**
** HISTORY OUTPUT: H-Output-1
**
*Output, history, variable=PRESELECT
*End Step
